// COMSOL Multiphysics 6.0.0.318 model "Component2D.mph"
// Outline of the model tree
// Unit system: none

Parameters
  g = 4  // Coefficient gamma
  a = 0.01  // Global diffusuon
  lcx = 0.5  // x light center
  lcy = 0.5  // y light center
  m0x = 0.5  // x m0 pulse center
  m0y = 0.5  // y m0 pulse center
  init_m0 = 0.7

Functions
  an1: Analytic "L_circle" | funcname = L_circle; expr = exp((-(x-lcx)^2-(y-lcy)^2)/0.02); args = {x, y}
  an2: Analytic "L_square" | funcname = L_square; expr = exp((-(x-lcx)^20-(y-lcy)^20)/1E-12); args = {x, y}
  an5: Analytic "Light" | funcname = L; expr = L_circle(x, y); args = {x, y}
  an3: Analytic "Circle" | funcname = M_circle; expr = exp((-(x-m0x)^2-(y-m0y)^2)/0.02)/1.5+0.3; args = {x, y}
  an6: Analytic "Flat" | funcname = M_flat; expr = -x*0.000001-y*0.000001+init_m0; args = {x, y}
  an4: Analytic "Initial M" | funcname = M0; expr = M_flat(x,y); args = {x, y}

Variables
  var1 "Variables"
    reac = g*cM*(-log(cM/(1-cN)))^((g-1)/g)

Geometry
  geom2 "Geometry" (2D, length unit m)
    sq1: Square
    fin: Finalize "Form Union"

Physics
  tcs: ConcentratedSpecies "Transport of Concentrated Species" on all domains
    dependent variable cN = {cN, cM, cP}
    dz.dz = 1
    TransportMechanism.DiffusionModel = MaxwellStefan
    SpeciesProperties.FromMassConstraint = 3
    cdm1: ConvectionDiffusionMigration "Transport Properties" (default)
      rho_src = userdef
      rho = 1
      u_src = fromCommonDef
      DiffusionTableType = matrix
      DF = {a, a*exp(-cP/0.13), a*exp(-cP/0.13)}
      minput_pressure = 1
      minput_temperature = 1
      M_cN = 1
      M_cM = 1
      M_cP = 1
    init1: init "Initial Values" (default) | MixtureSpecification = MoleFractions; x0 = {1-M0(x,y)-0.01, M0(x,y), 0.1}
    nflx1: NoFlux (default)
    reac1: ReactionSources on domains 1 | R_cM = -L(x,y)*reac

Mesh
  mesh2 "Mesh"
    size: MeshSizeDefault | table = cfd; hmax = 0.0067; hmin = 2.0E-5; hcurve = 0.2; hauto = 1
    fq1: FreeQuad on remaining entities
    ftri1: FreeTri "Free Triangular 1" (disabled) on remaining entities

Studies
  std1 "Study"
    time: Transient "Time Dependent" | tlist = range(0,0.002002002002,2)

Solver configurations
  sol1 "Solution 1" (study std1)
    v1: Variables "Dependent Variables 1"
    t1: Time "Time-Dependent Solver 1"
      tlist = range(0,0.002002002002,2)
      rtol = 0.005
      timemethod = rk
      tstepsbdf = intermediate
      maxorder = 2
      eventtol = 0.0001
      stabcntrl = on
      masssingular = yes
      estrat = exclude
      tstepsrk34 = intermediate
      fc1: FullyCoupled
        linsolver = d1
        dtech = auto
        maxiter = 8
        damp = 0.9
        jtech = once
        stabacc = aacc
        aaccdim = 5
        aaccmix = 0.9
        aaccdelay = 1
      d1: Direct "Direct, mass fractions (tcs)" | linsolver = pardiso; pivotperturb = 1.0E-13

Datasets
  dset1: Solution | solution = sol1
  an1_ds1: Grid2D | function = an1
  cln1: CutLine2D | data = dset1; genpoints = {{0, 0}, {1, 1}}

Plots
  pg7: PlotGroup2D "3D Plots" | data = dset1
    surf1: Surface "cN" | expr = cN
      hght1: Height "Height Expression 1" | expr = cN
    surf2: Surface "cM" (disabled) | expr = cM
      hght1: Height "Height Expression 1" | expr = cN
    surf3: Surface "cP" (disabled) | expr = cP
      hght1: Height "Height Expression 1" | expr = cN
    surf4: Surface "light" (disabled) | expr = L(x,y); wireframe = on
      hght1: Height "Height Expression 1" | expr = cN
  pg2: PlotGroup2D "Plot N"
    data = dset1
    prefixintitle = Species cN
    typeintitle = off
    descriptionintitle = off
    unitintitle = off
    con1: Contour
      expr = cN
      levelmethod = levels
      levels = range((1-init_m0-0.01)-0.05,((1-init_m0-0.01)+0.05-((1-init_m0-0.01)-0.05))/10,(1-init_m0-0.01)+0.05)
      contourtype = filled
  pg5: PlotGroup2D "Plot M"
    data = dset1
    prefixintitle = Species cN
    typeintitle = off
    descriptionintitle = off
    unitintitle = off
    con1: Contour | expr = cM; levelmethod = levels; levels = range(0,0.1,1); contourtype = filled
  pg6: PlotGroup2D "Plot P"
    data = dset1
    prefixintitle = Species cN
    typeintitle = off
    descriptionintitle = off
    unitintitle = off
    con1: Contour | expr = cP; levelmethod = levels; levels = range(0,0.1,1); contourtype = filled
  pg8: PlotGroup1D "1D Plot" | data = cln1; xlabel = Diagonal
    lngr1: LineGraph "Plot N" | expr = cN
    lngr2: LineGraph "Plot P" | expr = cP
    lngr3: LineGraph "Plot M" | expr = cM
    lngr4: LineGraph "Plot light" | expr = L(x,y)

Exports
  anim1: Animation "2D N" | target = player
  anim2: Animation "2D M" | target = player
  anim3: Animation "2D P" | target = player
  anim4: Animation "3D Full" | target = player; maxframes = 50
  anim5: Animation "1D" | target = player