// COMSOL Multiphysics 6.0.0.318 model "SOR optimaze.mph"
// Outline of the model tree
// Unit system: none

Parameters
  k1init = 0.1
  k2init = 1E+5
  k3init = 1E+4
  k5init = 0.0001
  k6init = 2
  k8init = 1
  k9init = 1
  k10init = 10
  k11init = 0.1
  K2init = 100000
  K4init = 0.05
  t_end = 2
  scaller = 2
  step_check = 5
  k1 = k1init
  k2 = k2init
  k3 = k3init
  k4 = K2*k5
  k5 = k5init
  k6 = k6init
  k7 = K4*k8
  k8 = k8init
  k9 = k9init
  k10 = k10init
  k11 = k11init
  K2 = K2init
  K4 = K4init

Functions
  step1: Step | funcname = step; location = 5; from = 1; to = 0

Variables
  var1 "Variables"
    light = step(t)
    Hin0 = 1
    DH0 = 1
    Pyr0 = 0
  var3 "Rates (R)"
    R1 = k1*Hin*DH*light
    R2 = k2*Hin_m*DH_p
    R3 = k3*HinH*D
    R4 = k4*HinH*HinH
    R5 = k5*Hin*Pyr
    R6 = k6*Hin*HinHD
    R7 = k7*HinD
    R8 = k8*Hin*D
    R9 = k9*HinHD
    R10 = k10*D*D
    R11 = k11*Hin

Physics
  ge: GlobalEquations "Global ODEs and DAEs"
    ge1: GlobalEquations "Mechanism (M)"
      name = {Hin, DH, Hin_m, DH_p, HinH, D, HinHD, Pyr, HinD, WTF}
      equation = {-Hint + -R1 + R4 - R5 - R6 + R7 - R8 - R11, -DHt + -R1, -Hin_mt + R1 - R2, -DH_pt + R1 - R2, -HinHt + R2 - R3 - 2*R4 + 2*R5 + R6, -Dt + R2 - R3 + R7 - R8 - 2*R10, -HinHDt + R3 - R6 - R9, -Pyrt + R4 - R5 + R9, -HinDt + R6 - R7 + R8, -WTFt + R9 + R10 + R11}
      initialValueU = {Hin0, DH0, 0, 0, 0, 0, 0, Pyr0, 0, 0}
      initialValueUt = {0, 0, 0, 0, 0, 0, 0, 0, 0, 0}
      description = {, , , , , , , , , }
      valueType = complex
      DependentVariableQuantity = dimensionless
      CustomDependentVariableUnit = m
      SourceTermQuantity = dimensionless
      CustomSourceTermUnit = m

Studies
  std1 "Study"
    param: Parametric "Parametric Sweep"
      sweeptype = filled
      pname = k1
      plistarr = range(0,1,100)
      accumtable = new
      reusesol = on
    opt: Optimization | constrmethod = augLagrange
    time: Transient "Time Dependent" | tlist = range(0,(t_end-0)/100,t_end)

Tables
  tbl3: Table "Constant table"
    k1 | Objective
    1 | 0.00170309
    1.3 | 0.00174078
    1.9 | 0.00186213
    3.1 | 0.00194278
    5.5 | 0.00204613
    10.3 | 0.00204623
    19.9 | 0.0020098
    14.14 | 0.00205801
    21.82 | 0.00194989
    6.46 | 0.00206845
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
Plots
  pg1: PlotGroup1D "Plots base" | data = none; xlabel = Time; ylabel = Concentration
    glob3: Global "light" | expr = light; autoexpr = on
    glob1: Global "Important" | expr = {Hin, DH, D, Pyr}; descriptionintitle = off; unitintitle = off; autoexpr = on
    glob2: Global "Not important"
      expr = {Hin_m, DH_p, WTF, HinHD, HinH, HinD}
      descriptionintitle = off
      unitintitle = off
      autoexpr = on
  pg2: PlotGroup1D "Plots parametric" | data = none; xlabel = Time; ylabel = Concentration
    glob3: Global "light" | expr = light; autoexpr = on
    glob1: Global "Important" (disabled)
      expr = {Hin, DH, D, Pyr}
      descriptionintitle = off
      unitintitle = off
      autoexpr = on
    glob2: Global "Not important" (disabled)
      expr = {Hin_m, DH_p, WTF, HinHD, HinH, HinD}
      descriptionintitle = off
      unitintitle = off
      autoexpr = on
    glob4: Global "Important 1" | expr = D; descriptionintitle = off; unitintitle = off; autoexpr = on

Methods
  solve_base: CodeEditor "Method 1"
    public class solve_base extends ApplicationMethod {
      public void execute() {
        model.sol("sol1").run();
        useGraphics(model.result("pg1"), "Plot/graphics1");
      }
    }
  method1: CodeEditor "Method 1a"
    public class method1 extends ApplicationMethod {
      public void execute() {
        model.sol("sol1").run();
      }
    }
  show_components: CodeEditor "Method 2"
    public class show_components extends ApplicationMethod {
      public void execute() {
        model.result("pg1").feature("glob2").active(true);
        useGraphics(model.result("pg1"), "form2/graphics1");
      }
    }
  hide_components: CodeEditor "Method 2a"
    public class hide_components extends ApplicationMethod {
      public void execute() {
        model.result("pg1").feature("glob2").active(false);
        useGraphics(model.result("pg1"), "form2/graphics1");
      }
    }