// COMSOL Multiphysics 6.0.0.318 model "SOR.mph"
// Outline of the model tree
// Unit system: none

Parameters
  t_end = 2
  scaller = 2
  step_check = 5
  k1 = k1init
  k2 = k2init
  k3 = k3init
  k4 = K2*k5
  k5 = k5init
  k6 = k6init
  k7 = K4*k8
  k8 = k8init
  k9 = k9init
  k10 = k10init
  k11 = k11init
  K2 = K2init
  K4 = K4init
  Hin0 = 1
  DH0 = 1
  Pyr0 = 0
  k1init = 1000
  k2init = 1000000000
  k3init = 1000000000
  k4init = K2*k5
  k5init = 100
  k6init = 2
  k7init = K4*k8
  k8init = 1
  k9init = 0.001
  k10init = 1000000000
  k11init = 1E-05
  K2init = 100000
  K4init = 0.05

Functions
  step1: Step | funcname = step; location = 50; from = 1; to = 0

Variables
  var1 "Variables"
    light = 1
  var3 "Rates (R)"
    R1 = k1*Hin*DH
    R2 = k2*Hin_m*DH_p
    R3 = k3*HinH*D
    R4 = k4*HinH*HinH
    R5 = k5*Hin*Pyr
    R6 = k6*Hin*HinHD
    R7 = k7*HinD
    R8 = k8*Hin*D
    R9 = k9*HinHD
    R10 = k10*D*D
    R11 = k11*Hin
  var4 "Rates" (disabled)
    R1 = k1*Hin*DH
    R2 = k2*Hin_m*DH_p
    R3 = k3*HinH*D
    R4 = k4*HinH*HinH
    R5 = k5*Hin*Pyr
    R6 = k6*Hin*HinHD
    R7 = k7*HinD
    R8 = k8*Hin*D
    R9 = k9*HinHD
    R10 = k10*D*D
    R11 = k11*Hin

Physics
  ge: GlobalEquations "Global ODEs and DAEs"
    ge1: GlobalEquations "Mechanism (M)"
      name = {Hin, DH, Hin_m, DH_p, HinH, D, HinHD, Pyr, HinD, WTF}
      equation = {-Hint + -R1 + R4 - R5 - R6 + R7 - R8 - R11, -DHt + -R1, -Hin_mt + R1 - R2, -DH_pt + R1 - R2, -HinHt + R2 - R3 - 2*R4 + 2*R5 + R6, -Dt + R2 - R3 + R7 - R8 - 2*R10, -HinHDt + R3 - R6 - R9, -Pyrt + R4 - R5 + R9, -HinDt + R6 - R7 + R8, -WTFt + R9 + R10 + R11}
      initialValueU = {Hin0, DH0, 0, 0, 0, 0, 0, Pyr0, 0, 0}
      initialValueUt = {0, 0, 0, 0, 0, 0, 0, 0, 0, 0}
      description = {, , , , , , , , , }
      valueType = complex
      DependentVariableQuantity = dimensionless
      CustomDependentVariableUnit = m
      SourceTermQuantity = dimensionless
      CustomSourceTermUnit = m

Studies
  std1 "Study"
    time: Transient "Time Dependent" | tlist = range(0,5.0e-8,5.0e-4) range(5.0e-4,5.0e-7,0.001)

Solver configurations
  sol1 "Solution 1" (study std1)
    v1: Variables "Dependent Variables 1"
    t1: Time "Time-Dependent Solver 1"
      tlist = range(0,5.0e-8,5.0e-4) range(5.0e-4,5.0e-7,0.001)
      atolglobalmethod = unscaled
      atolglobalfactor = 1
      tstepsbdf = strict
      maxorder = 2
      stabcntrl = on
      masssingular = yes
      rescaleafterinitbw = on
      dDef: Direct
      fc1: FullyCoupled | linsolver = dDef

Datasets
  dset1: Solution | solution = none
  dset2: Solution | solution = sol1

Derived values
  gev1: EvalGlobal "Global Evaluation 1"
    data = dset2
    expr = {Hin, DH, Hin_m, DH_p, HinH, D, HinHD, Pyr, HinD, WTF}
    descr = {State variable Hin, State variable DH, State variable Hin_m, State variable DH_p, State variable HinH, State variable D, State variable HinHD, State variable Pyr, State variable HinD, State variable WTF}

Plots
  pg1: PlotGroup1D "Plots base" | data = dset2; xlabel = Time; ylabel = Concentration
    glob1: Global "Important" | expr = {Hin, DH, Pyr}; descriptionintitle = off; unitintitle = off; autoexpr = on
    glob2: Global "Not important"
      expr = {Hin_m, DH_p, WTF, HinHD, HinH, HinD}
      descriptionintitle = off
      unitintitle = off
      autoexpr = on
    glob4: Global "Important 1" | expr = D; descriptionintitle = off; unitintitle = off; autoexpr = on

Methods
  solve_base: CodeEditor "Method 1"
    public class solve_base extends ApplicationMethod {
      public void execute() {
        model.sol("sol1").run();
        useGraphics(model.result("pg1"), "Plot/graphics1");
      }
    }
  show_components: CodeEditor "Method 2"
    public class show_components extends ApplicationMethod {
      public void execute() {
        model.result("pg1").feature("glob2").active(true);
        model.result("pg1").feature("glob1").active(true);
        useGraphics(model.result("pg1"), "form2/graphics1");
      }
    }
  hide_components: CodeEditor "Method 2a"
    public class hide_components extends ApplicationMethod {
      public void execute() {
        model.result("pg1").feature("glob2").active(false);
        useGraphics(model.result("pg1"), "form2/graphics1");
      }
    }
  show_d: CodeEditor "Method 1a"
    public class show_d extends ApplicationMethod {
      public void execute() {
        model.result("pg1").feature("glob2").active(false);
        model.result("pg1").feature("glob1").active(false);
        model.result("pg1").feature("glob4").active(true);
        useGraphics(model.result("pg1"), "form2/graphics1");
      }
    }